X := [1; 2; 3; 4; 5; 6]
F(x) := log(x)
Y := F(X) = [0; 0.30103; 0.477121; 0.60206; 0.69897; 0.778151]
h := X[1] - X[0]
L :=
    for i ∈ 2 .. length(X) - 1
        L[i - 2] ← (Y[i] - Y[i - 1])/(1/2*((X[i] - X[i - 1]) + (X[i - 1] - X[i - 2])))
        i ← i + 1
    L
L = [0.176091; 0.124939; 0.09691; 0.0791812]
Q1(i) := (F(X[i] + h/2) - F(X[i - 1] + h/2))/(1/2*((h/2 + X[i]) - (X[i - 2] + h/2)))
Zeil(Q) :=
    for i ∈ 0 .. length(X) - 4
        M[i] ←
            Q1(i + 2)*(Q[i]^2 + 3*Q[i]*Q[i + 1])/(Q[i] + Q[i + 1])^2 if Q[i]*Q[i + 1] > 0
            0 if Q[i]*Q[i + 1] ≤ 0
        i ← i + 1
    M
Zeil(L) = [0.156434; 0.115168; 0.0910956]
df(x) := d/dx(F(x))
df(3) = 0.144765
df(4) = 0.108574
df(5) = 0.0868589
