a := 0.3  # скорость переноса
μ(x) := sin(x)  # начальное условие
ν(t) := t  # условие на границе
K := 100
l := 1
T := 3
h := 0.1  # шаги по координате
τ := 0.1  # шаг по времени
nx := 1/h
nx = 10  # подсчет количества узлов разрядной сетки по пространству и времени
nt := T/τ
nt = 30
MakeMAtrix(a, n) :=
    for i ∈ 0 .. n
        P[i, i] ← 1
    for i ∈ 0 .. n - 1
        P[i, i + 1] ← -a
        P[i + 1, i] ← a
    P
# блок составления матрицы трехдиагонального вида
# заполнение матрицы
# начальными значениями
# трехдиагональная матрица
U :=
    for m ∈ 0 .. nx
        for n ∈ 0 .. nt
            U[m, n] ← μ(m*h)
    for n ∈ 0 .. nt
        U[0, n] ← ν(n*τ)
    A ← MakeMAtrix(a*τ/(3*h), nx - 1)
    for n ∈ 1 .. nt - 1
        for k ∈ 1 .. K
            b[0] ← ((4*U[1, n] - U[1, n - 1])/3) + 2*a*τ/(3*h)*(U[0, n + 1] - U[2, n + 1]) - a*τ/(3*h)*ν(n*τ)
            for m ∈ 2 .. nx - 1
                b[m - 1] ← ((4*U[m, n] - U[m, n - 1])/3) + 2*a*τ/(3*h)*(U[m - 1, n + 1] - U[m + 1, n + 1])
            b[nx - 1] ← ((4*U[m, n] - U[m, n - 1])/3) + 2*a*τ/(3*h)*(U[m - 1, n + 1] - U[m + 1, n + 1]) + 2*a*τ/(3*h)*U[m + 1, n + 1]
        z ← A^-1*b
        L ← 0
        for m ∈ 1 .. nx - 1
            U[m, n] ← z[L]
            L ← L + 1
    U  # запишем правую часть
# Блок построение решения
A := MakeMAtrix(a*τ/(3*h), nx - 1)
A = [
    1, -0.1, 0, 0, 0, 0, 0, 0, 0, 0;
    0.1, 1, -0.1, 0, 0, 0, 0, 0, 0, 0;
    0, 0.1, 1, -0.1, 0, 0, 0, 0, 0, 0;
    0, 0, 0.1, 1, -0.1, 0, 0, 0, 0, 0;
    0, 0, 0, 0.1, 1, -0.1, 0, 0, 0, 0;
    0, 0, 0, 0, 0.1, 1, -0.1, 0, 0, 0;
    0, 0, 0, 0, 0, 0.1, 1, -0.1, 0, 0;
    0, 0, 0, 0, 0, 0, 0.1, 1, -0.1, 0;
    0, 0, 0, 0, 0, 0, 0, 0.1, 1, -0.1;
    0, 0, 0, 0, 0, 0, 0, 0, 0.1, 1
]
LineM0func(a) := [h*a; 0; U[a, 0]]
LineM0 := CreateSpace(LineM0func, 0, nx, nx + 1)
LineM1func(a) := [0; τ*a; U[0, a]]
LineM1 := CreateSpace(LineM1func, 0, nt, nt + 1)
LineM2func(a) := [l; τ*a; U[nx, a]]
LineM2 := CreateSpace(LineM2func, 0, nt, nt + 1)
PlotOXfunc(i, j) := [i*h; j*τ; U[i, j]]
PlotOX := CreateMesh(PlotOXfunc, 0, nx, 0, nt, nx + 1, nt + 1)
U = [
    0, 0.1, 0.2, 0.3, 0.4, 0.5, 0.6, 0.7, 0.8, 0.9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;
    0.0998334, 0.107744, 0.115828, 0.122804, 0.130518, 0.137859, 0.145367, 0.152805, 0.160271, 0.167727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;
    0.198669, 0.176442, 0.183653, 0.180361, 0.180754, 0.179873, 0.179426, 0.178834, 0.178289, 0.177729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;
    0.29552, 0.276843, 0.282952, 0.281043, 0.281707, 0.281551, 0.281655, 0.281677, 0.281724, 0.281764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;
    0.389418, 0.371163, 0.377208, 0.375196, 0.375862, 0.375636, 0.375707, 0.375679, 0.375684, 0.375678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;
    0.479426, 0.462104, 0.467807, 0.465932, 0.466548, 0.466346, 0.466412, 0.466391, 0.466398, 0.466396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;
    0.564642, 0.548396, 0.553731, 0.551981, 0.552554, 0.552367, 0.552428, 0.552408, 0.552414, 0.552412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;
    0.644218, 0.629227, 0.634122, 0.632527, 0.633046, 0.632878, 0.632932, 0.632914, 0.63292, 0.632918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;
    0.717356, 0.703918, 0.708238, 0.706851, 0.707295, 0.707153, 0.707199, 0.707184, 0.707189, 0.707187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;
    0.783327, 0.773061, 0.77636, 0.7753, 0.775641, 0.775531, 0.775567, 0.775555, 0.775559, 0.775558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;
    0.841471, 0.841471, 0.841471, 0.841471, 0.841471, 0.841471, 0.841471, 0.841471, 0.841471, 0.841471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]
# [component: inputs PlotOX]
