μ(x) := sin(x)  # начальное условие
ν(t) := t  # условие на границе
f(x, t) := 0  # однородная часть уравнения
max := 1
T := 1
L := 1
h := 0.1
# шаги по координате
nx := max/h = 10  # подсчет кол. узлов разрядной сетки по пространству и времени
τ := 0.1  # шаг по времени
a := 0.3  # скорость переноса
nt := max/τ = 10
n := max/h
n = 10
A :=
    for i ∈ 0 .. nx
        U[i, 0] ← μ(i*h)
    for j ∈ 0 .. nt
        U[0, j] ← ν(j*h)
    for i ∈ 1 .. nt - 1
        B2[i] ← -(3*U[0, i + 1] - 4*U[0, i] + U[0, i - 1])/3
    for i ∈ 1 .. nt - 1
        B1[i] ← -h*a*(U[i + 1, 0] - U[i - 1, 0])/(3*h)
    for i ∈ 1 .. nt - 1
        B[i - 1] ← B1[i] + B2[i]
    for i ∈ 1 .. nx
        for j ∈ 1 .. nx - 1
            C[i] ← U[i, 0] - U[i - 1, 0]
    M[0, 0] ← C[0]
    M[0, 1] ← -C[1]
    λ ← 1/3
    α ← a/3
    M[1, 1] ← C[1]
    for i ∈ 2 .. (nx - 2)
        M[i, i - 1] ← α*(U[i - 1, 0] - U[i - 2, 0])
        M[i, i] ← C[i]
        M[i, i + 1] ← -α*(U[i + 1, 0] - U[i, 0])
    M[n - 1, n - 2] ← -C[n - 2]
    M[1, 2] ← -α*(U[1, 0] - U[0, 0])
    M[n - 1, n - 1] ← C[n - 2]
    for i ∈ 0 .. nx - 2
        for j ∈ 0 .. nx - 2
            A[i, j] ← M[i + 1, j + 1]
    [A, B]  # блок составления матрицы трехдиагонального вида
X :=
    for i ∈ 0 .. n - 2
        x[i] ← h + i*h
    x
# составленная трехдиагональная матрица и вектор правых частей
A = [[
    0.0998334, -0.00998334, 0, 0, 0, 0, 0, 0, 0;
    0.00998334, 0.0988359, -0.00968509, 0, 0, 0, 0, 0, 0;
    0, 0.00988359, 0.0968509, -0.00938981, 0, 0, 0, 0, 0;
    0, 0, 0.00968509, 0.0938981, -0.00900072, 0, 0, 0, 0;
    0, 0, 0, 0.00938981, 0.0900072, -0.00852169, 0, 0, 0;
    0, 0, 0, 0, 0.00900072, 0.0852169, -0.00795752, 0, 0;
    0, 0, 0, 0, 0, 0.00852169, 0.0795752, -0.00731384, 0;
    0, 0, 0, 0, 0, 0, 0.00795752, 0.0731384, -0.00659708;
    0, 0, 0, 0, 0, 0, 0, -0.0731384, 0.0731384
], [-0.0865336; -0.0862353; -0.0857416; -0.0850572; -0.0841891; -0.0831459; -0.081938; -0.0805776; -0.0790782]]
# полученное решение
ORIGIN := 1
X = [0.1; 0.2; 0.3; 0.4; 0.5; 0.6; 0.7; 0.8; 0.9]
B := augment(A[1, 1], A[1, 2]) = [
    0.0998334, -0.00998334, 0, 0, 0, 0, 0, 0, 0, -0.0865336;
    0.00998334, 0.0988359, -0.00968509, 0, 0, 0, 0, 0, 0, -0.0862353;
    0, 0.00988359, 0.0968509, -0.00938981, 0, 0, 0, 0, 0, -0.0857416;
    0, 0, 0.00968509, 0.0938981, -0.00900072, 0, 0, 0, 0, -0.0850572;
    0, 0, 0, 0.00938981, 0.0900072, -0.00852169, 0, 0, 0, -0.0841891;
    0, 0, 0, 0, 0.00900072, 0.0852169, -0.00795752, 0, 0, -0.0831459;
    0, 0, 0, 0, 0, 0.00852169, 0.0795752, -0.00731384, 0, -0.081938;
    0, 0, 0, 0, 0, 0, 0.00795752, 0.0731384, -0.00659708, -0.0805776;
    0, 0, 0, 0, 0, 0, 0, -0.0731384, 0.0731384, -0.0790782
]
n1 := rows(B)
m1 := cols(B)
Progonka(B, m1, n1) :=
    i ← 1
    j ← n1
    P[i] ← B[1, 2]/(-B[1, 1])
    Q[i] ← -(B[1, m1]/(-B[1, 1]))
    while (i < j)
        P[i + 1] ← B[i + 1, i + 2]/(-B[i + 1, i + 1] - B[i + 1, i]*P[i])
        Q[i + 1] ← (B[i + 1, i]*Q[i] - B[i + 1, m1])/(-B[i + 1, i + 1] - B[i + 1, i]*P[i])
        i ← i + 1
    X[j] ← Q[j]
    while (j > 1)
        X[j - 1] ← P[j - 1]*X[j] + Q[j - 1]
        j ← j - 1
    X
# Решение системы при помощи метода прогонки
SolProg := Progonka(B, m1, n1) = [-0.953075; -0.862951; -0.884878; -0.904032; -0.933245; -0.973791; -1.03518; -1.19434; -2.27555]
ORIGIN := 0
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